# Лабораторная работа 8 "Краевая задача для ОДУ второго порядка".
# Гордеев Никита, группа 22307, вариант 7
# ДАНО:
p(x) := 1/(1 + x^2)
# Коэффициент
q(x) := 1 + 0.3*x  # Коэффициент
f(x) := ln(x + sqrt(x + 1))
aa := 0  # Задание граничных условий
bb := 2.5  # Задание граничных условий
μ[1] := 1  # Задание начальных условий для параметра
μ[2] := 0  # Задание начальных условий для параметра
# ЭТАП 1: РАЗНОСТНАЯ СХЕМА С ПРАВОЙ РАЗНОСТНОЙ ПРОИЗВОДНОЙ
# Параметры разностной схемы
n := 200
# количество узлов
i := 0 .. n  # индексы узлов
h := (bb - aa)/n
# шаг сетки
x[i] := aa + i*h  # вычисление значений на узлах сетки
i := 1 .. n - 1
# индексы узлов сетки
b[i] := 1  # коэфф разн схемы
a[i] := 1 - p(x[i])*h
c[i] := 2 - p(x[i])*h + q(x[i])*h^2
g[i] := -f(x[i])
# Метод прогонки
α[1] := 0
# параметров метода подгонки
β[1] := μ[1]  # параметров метода подгонки
# Рекуррентные формулы для вычисления | Рекуррентные формулы для вычисления
α[i + 1] := b[i]/(c[i] - a[i]*α[i])
β[i + 1] := (h^2*g[i] + a[i]*β[i])/(c[i] - a[i]*α[i])
i := n - 1 .. 1
# Рекуррентные формулы для вычисления
y1[0] := μ[1]  # Начальные условия
y1[n] := μ[2]
y1[i] := α[i + 1]*y1[i + 1] + β[i + 1]  # Рекуррентная формула
i := 0 .. n
# [plot: y1[i] vs x[i]]
y1 = [
    1; 0.971819; 0.944146; 0.916973; 0.890293; 0.864098; 0.83838; 0.813133; 0.788348; 0.764018
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]
# Количество узлов
# сетки (удвоенное)
n := 2*n
i := 0 .. n  # Индексы для итерации по узлам
h := (bb - aa)/n
# Шаг сетки
x[i] := aa + i*h  # Вычисление значений x на узлах сетки
i := 1 .. n - 1
# Индексы для итерации
b[i] := 1  # Коэффициенты разностной схемы
a[i] := 1 - p(x[i])*h
c[i] := 2 - p(x[i])*h + q(x[i])*h^2
g[i] := -f(x[i])
α[1] := 0  # Начальные значения параметров метода подгонки
β[1] := μ[1]
α[i + 1] := b[i]/(c[i] - a[i]*α[i])
# Рекуррентные
# формулы
β[i + 1] := (h^2*g[i] + a[i]*β[i])/(c[i] - a[i]*α[i])
# Рекуррентные
# формулы
i := n - 1 .. 1  # Индексы для итерации
y2[0] := μ[1]
y2[n] := μ[2]
y2[i] := α[i + 1]*y2[i + 1] + β[i + 1]  # Рекуррентная формула для вычисления y2 на узлах сетки
y2 = [
    1; 0.985872; 0.971871; 0.957996; 0.944247; 0.930623; 0.917121; 0.903743; 0.890486; 0.87735
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]
# оценка погрешности
j := 0 .. n/2
# вычисл инд для итерации
y1[0] = 1  # Начальные условия на узле 0
y2[0] = 1  # Начальные условия на узле 0
r[j] := |y1[j] - y2[2*j]|
max(r) = 0.000857814  # Проверка максимального значения
# График погрешности
# [plot: r[j] vs j]
r = [
    0; 5.15464e-5; 0.000100865; 0.000148015; 0.000193058; 0.000236052; 0.000277057; 0.00031613; 0.00035333; 0.000388714
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]
# ЭТАП 2: ПРИБЛИЖЕННОЕ РЕШЕНИЕ
solve block
    # constraints
    (d^2/dt^2(w(t))) + p(t)*(d/dt(w(t))) - q(t)*w(t) == f(t)
    w(aa) == μ[1]
    w(bb) == μ[2]
    # solver
    w := odesolve(w(t), bb)
end solve block
w
# ЭТАП 3: ГРАФИКИ РАЗНОСТИ
# [plot: w(t) vs t]
# [plot: |w(x[i]) - y2[i]| vs i]
